<neuroml xmlns="http://www.neuroml.org/schema/neuroml2"  xmlns:xs="http://www.w3.org/2001/XMLSchema" xmlns:xsi="http://www.w3.org/2001/XMLSchema-instance" xsi:schemaLocation="http://www.neuroml.org/schema/neuroml2 https://raw.github.com/NeuroML/NeuroML2/development/Schemas/NeuroML2/NeuroML_v2.3.1.xsd" id="Golgi_cell_network">
    <annotation>
                    <rdf:RDF xmlns:bqbiol="http://biomodels.net/biology-qualifiers/" xmlns:prism="http://prismstandard.org/namespaces/basic/2.0/" xmlns:dcterms="http://purl.org/dc/terms/" xmlns:rdf="http://www.w3.org/1999/02/22-rdf-syntax-ns#" xmlns:dc="http://purl.org/dc/elements/1.1/" xmlns:foaf="http://xmlns.com/foaf/0.1/" xmlns:orcid="https://orcid.org/">
              <rdf:Description rdf:about="Golgi_cell_network">
                <dc:title>Cerebellar Golgi Cell network model</dc:title>
                <dcterms:abstract>Cerebellar Golgi Cell network model</dcterms:abstract>
                <prism:keyword>
                  <rdf:Bag>
                    <rdf:li>Golgi cell</rdf:li>
                    <rdf:li>Cerebellum</rdf:li>
                  </rdf:Bag>
                </prism:keyword>
                <bqbiol:isVersionOf>
                  <rdf:Bag>
                    <rdf:li rdf:resource="https://github.com/harshagurnani/GoC_Network_Sim_BehInputs"/>
                  </rdf:Bag>
                </bqbiol:isVersionOf>
                <dc:source>
                  <rdf:Bag>
                    <rdf:li rdf:resource="https://github.com/sanjayankur31/GolgiCellNetwork/"/>
                  </rdf:Bag>
                </dc:source>
                <dcterms:references>
                  <rdf:Bag>
                    <rdf:li rdf:resource="https://doi.org/10.1016/j.neuron.2021.03.027"/>
                    <rdf:li rdf:resource="https://doi.org/10.1016/j.neuron.2010.06.028"/>
                  </rdf:Bag>
                </dcterms:references>
                <dc:creator>
                  <rdf:Bag>
                    <rdf:li rdf:resource="#Ankur_Sinha"/>
                  </rdf:Bag>
                </dc:creator>
                <dcterms:created>
                  <rdf:Description>
                    <dcterms:W3CDTF>2025-06-21</dcterms:W3CDTF>
                  </rdf:Description>
                </dcterms:created>
              </rdf:Description>
              <rdf:Description rdf:about="#Ankur_Sinha">
                <foaf:name>Ankur Sinha</foaf:name>
                <foaf:mbox>ankur.sinha@ucl.ac.uk</foaf:mbox>
                <orcid:id rdf:resource="https://orcid.org/0000-0001-7568-7167"/>
              </rdf:Description>
            </rdf:RDF>

    </annotation>
    <include href="./cells/Golgi/GoC_00177.cell.nml"/>
    <include href="./cells/Golgi/GoC_00263.cell.nml"/>
    <include href="./cells/Golgi/GoC_00514.cell.nml"/>
    <include href="./cells/Golgi/GoC_00659.cell.nml"/>
    <include href="./cells/Golgi/GoC_00856.cell.nml"/>
    <gapJunction id="Gap_junction" conductance="426pS"/>
    <network id="Golgi_cell_network">
        <population id="GoC_00177_pop" component="GoC_00177" type="populationList">
            <instance id="0">
                <location x="92.143541906906819" y="23.677639400757567" z="67.488094358233013"/>
            </instance>
            <instance id="1">
                <location x="297.312389967224419" y="266.655081499375285" z="4.332406269480349"/>
            </instance>
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        </population>
        <population id="GoC_00263_pop" component="GoC_00263" type="populationList">
            <instance id="0">
                <location x="162.853707212673612" y="96.809345076888604" z="45.781164889742755"/>
            </instance>
            <instance id="1">
                <location x="460.201285546543886" y="439.534580757337892" z="25.261575504653024"/>
            </instance>
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        </population>
        <population id="GoC_00514_pop" component="GoC_00514" type="populationList">
            <instance id="0">
                <location x="350.677689618346506" y="311.38829330159956" z="49.368264574711205"/>
            </instance>
            <instance id="1">
                <location x="420.268850059244357" y="356.048493471823633" z="44.390898141585247"/>
            </instance>
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        </population>
        <population id="GoC_00659_pop" component="GoC_00659" type="populationList">
            <instance id="0">
                <location x="11.34023806239165" y="427.527343065828347" z="30.633720286627241"/>
            </instance>
            <instance id="1">
                <location x="379.391722376952089" y="281.637555069933057" z="3.816418217864814"/>
            </instance>
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        </population>
        <population id="GoC_00856_pop" component="GoC_00856" type="populationList">
            <instance id="0">
                <location x="386.61935744660525" y="440.171790638602204" z="63.739144695740521"/>
            </instance>
            <instance id="1">
                <location x="426.301120127276533" y="298.977685762213525" z="69.38466603020629"/>
            </instance>
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        </population>
        <electricalProjection id="GJ_0_1" presynapticPopulation="GoC_00177_pop" postsynapticPopulation="GoC_00263_pop">
            <electricalConnectionInstanceW id="22" preCell="../GoC_00177_pop/0/GoC_00177" preSegment="2" postCell="../GoC_00263_pop/0/GoC_00263" postSegment="1" synapse="Gap_junction" weight="1.791098300271282"/>
            <electricalConnectionInstanceW id="24" preCell="../GoC_00177_pop/0/GoC_00177" preSegment="1" postCell="../GoC_00263_pop/2/GoC_00263" postSegment="1" synapse="Gap_junction" weight="1.62116914641273"/>
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        </electricalProjection>
        <electricalProjection id="GJ_0_2" presynapticPopulation="GoC_00177_pop" postsynapticPopulation="GoC_00514_pop">
            <electricalConnectionInstanceW id="49" preCell="../GoC_00177_pop/0/GoC_00177" preSegment="5" postCell="../GoC_00514_pop/4/GoC_00514" postSegment="5" synapse="Gap_junction" weight="3.551126388802976"/>
            <electricalConnectionInstanceW id="55" preCell="../GoC_00177_pop/0/GoC_00177" preSegment="1" postCell="../GoC_00514_pop/10/GoC_00514" postSegment="1" synapse="Gap_junction" weight="3.004858070328367"/>
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        </electricalProjection>
        <electricalProjection id="GJ_0_3" presynapticPopulation="GoC_00177_pop" postsynapticPopulation="GoC_00659_pop">
            <electricalConnectionInstanceW id="76" preCell="../GoC_00177_pop/0/GoC_00177" preSegment="1" postCell="../GoC_00659_pop/8/GoC_00659" postSegment="2" synapse="Gap_junction" weight="1.716865314965507"/>
            <electricalConnectionInstanceW id="89" preCell="../GoC_00177_pop/0/GoC_00177" preSegment="5" postCell="../GoC_00659_pop/21/GoC_00659" postSegment="5" synapse="Gap_junction" weight="4.660602611200675"/>
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        </electricalProjection>
        <electricalProjection id="GJ_0_4" presynapticPopulation="GoC_00177_pop" postsynapticPopulation="GoC_00856_pop">
            <electricalConnectionInstanceW id="106" preCell="../GoC_00177_pop/0/GoC_00177" preSegment="2" postCell="../GoC_00856_pop/15/GoC_00856" postSegment="1" synapse="Gap_junction" weight="2.313520779244166"/>
            <electricalConnectionInstanceW id="224" preCell="../GoC_00177_pop/1/GoC_00177" preSegment="2" postCell="../GoC_00856_pop/20/GoC_00856" postSegment="5" synapse="Gap_junction" weight="2.320902452316784"/>
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        </electricalProjection>
        <electricalProjection id="GJ_0_0" presynapticPopulation="GoC_00177_pop" postsynapticPopulation="GoC_00177_pop">
            <electricalConnectionInstanceW id="126" preCell="../GoC_00177_pop/1/GoC_00177" preSegment="1" postCell="../GoC_00177_pop/14/GoC_00177" postSegment="1" synapse="Gap_junction" weight="2.465452084708435"/>
            <electricalConnectionInstanceW id="130" preCell="../GoC_00177_pop/1/GoC_00177" preSegment="5" postCell="../GoC_00177_pop/18/GoC_00177" postSegment="1" synapse="Gap_junction" weight="2.3773962395323"/>
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        </electricalProjection>
        <electricalProjection id="GJ_1_1" presynapticPopulation="GoC_00263_pop" postsynapticPopulation="GoC_00263_pop">
            <electricalConnectionInstanceW id="2370" preCell="../GoC_00263_pop/0/GoC_00263" preSegment="5" postCell="../GoC_00263_pop/2/GoC_00263" postSegment="1" synapse="Gap_junction" weight="5.251296956809353"/>
            <electricalConnectionInstanceW id="2376" preCell="../GoC_00263_pop/0/GoC_00263" preSegment="2" postCell="../GoC_00263_pop/8/GoC_00263" postSegment="1" synapse="Gap_junction" weight="2.034956058891182"/>
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        </electricalProjection>
        <electricalProjection id="GJ_1_2" presynapticPopulation="GoC_00263_pop" postsynapticPopulation="GoC_00514_pop">
            <electricalConnectionInstanceW id="2411" preCell="../GoC_00263_pop/0/GoC_00263" preSegment="2" postCell="../GoC_00514_pop/20/GoC_00514" postSegment="5" synapse="Gap_junction" weight="1.364641614946845"/>
            <electricalConnectionInstanceW id="2413" preCell="../GoC_00263_pop/0/GoC_00263" preSegment="5" postCell="../GoC_00514_pop/22/GoC_00514" postSegment="2" synapse="Gap_junction" weight="3.412588399418418"/>
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        </electricalProjection>
        <electricalProjection id="GJ_1_3" presynapticPopulation="GoC_00263_pop" postsynapticPopulation="GoC_00659_pop">
            <electricalConnectionInstanceW id="2422" preCell="../GoC_00263_pop/0/GoC_00263" preSegment="2" postCell="../GoC_00659_pop/8/GoC_00659" postSegment="5" synapse="Gap_junction" weight="2.431002708980828"/>
            <electricalConnectionInstanceW id="2431" preCell="../GoC_00263_pop/0/GoC_00263" preSegment="1" postCell="../GoC_00659_pop/17/GoC_00659" postSegment="5" synapse="Gap_junction" weight="1.081589193924343"/>
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        </electricalProjection>
        <electricalProjection id="GJ_1_4" presynapticPopulation="GoC_00263_pop" postsynapticPopulation="GoC_00856_pop">
            <electricalConnectionInstanceW id="2452" preCell="../GoC_00263_pop/0/GoC_00263" preSegment="2" postCell="../GoC_00856_pop/15/GoC_00856" postSegment="2" synapse="Gap_junction" weight="2.363426957764172"/>
            <electricalConnectionInstanceW id="2456" preCell="../GoC_00263_pop/0/GoC_00263" preSegment="5" postCell="../GoC_00856_pop/19/GoC_00856" postSegment="1" synapse="Gap_junction" weight="3.209433303279275"/>
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        </electricalProjection>
        <electricalProjection id="GJ_2_2" presynapticPopulation="GoC_00514_pop" postsynapticPopulation="GoC_00514_pop">
            <electricalConnectionInstanceW id="4209" preCell="../GoC_00514_pop/0/GoC_00514" preSegment="1" postCell="../GoC_00514_pop/1/GoC_00514" postSegment="1" synapse="Gap_junction" weight="2.742592920113549"/>
            <electricalConnectionInstanceW id="4219" preCell="../GoC_00514_pop/0/GoC_00514" preSegment="1" postCell="../GoC_00514_pop/11/GoC_00514" postSegment="2" synapse="Gap_junction" weight="1.996379045472549"/>
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        </electricalProjection>
        <electricalProjection id="GJ_2_3" presynapticPopulation="GoC_00514_pop" postsynapticPopulation="GoC_00659_pop">
            <electricalConnectionInstanceW id="4232" preCell="../GoC_00514_pop/0/GoC_00514" preSegment="5" postCell="../GoC_00659_pop/1/GoC_00659" postSegment="2" synapse="Gap_junction" weight="4.038030385186512"/>
            <electricalConnectionInstanceW id="4233" preCell="../GoC_00514_pop/0/GoC_00514" preSegment="2" postCell="../GoC_00659_pop/2/GoC_00659" postSegment="2" synapse="Gap_junction" weight="3.06910092755406"/>
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        </electricalProjection>
        <electricalProjection id="GJ_2_4" presynapticPopulation="GoC_00514_pop" postsynapticPopulation="GoC_00856_pop">
            <electricalConnectionInstanceW id="4255" preCell="../GoC_00514_pop/0/GoC_00514" preSegment="2" postCell="../GoC_00856_pop/1/GoC_00856" postSegment="2" synapse="Gap_junction" weight="2.936545273959914"/>
            <electricalConnectionInstanceW id="4274" preCell="../GoC_00514_pop/0/GoC_00514" preSegment="5" postCell="../GoC_00856_pop/20/GoC_00856" postSegment="5" synapse="Gap_junction" weight="7.028426936575933"/>
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        </electricalProjection>
        <electricalProjection id="GJ_3_4" presynapticPopulation="GoC_00659_pop" postsynapticPopulation="GoC_00856_pop">
            <electricalConnectionInstanceW id="5556" preCell="../GoC_00659_pop/0/GoC_00659" preSegment="2" postCell="../GoC_00856_pop/14/GoC_00856" postSegment="2" synapse="Gap_junction" weight="0.662400320987256"/>
            <electricalConnectionInstanceW id="5594" preCell="../GoC_00659_pop/1/GoC_00659" preSegment="5" postCell="../GoC_00856_pop/8/GoC_00856" postSegment="5" synapse="Gap_junction" weight="1.086881187214255"/>
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        </electricalProjection>
        <electricalProjection id="GJ_3_3" presynapticPopulation="GoC_00659_pop" postsynapticPopulation="GoC_00659_pop">
            <electricalConnectionInstanceW id="5565" preCell="../GoC_00659_pop/1/GoC_00659" preSegment="2" postCell="../GoC_00659_pop/2/GoC_00659" postSegment="1" synapse="Gap_junction" weight="1.61367558965466"/>
            <electricalConnectionInstanceW id="5566" preCell="../GoC_00659_pop/1/GoC_00659" preSegment="2" postCell="../GoC_00659_pop/3/GoC_00659" postSegment="1" synapse="Gap_junction" weight="4.114302291750739"/>
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        </electricalProjection>
        <electricalProjection id="GJ_4_4" presynapticPopulation="GoC_00856_pop" postsynapticPopulation="GoC_00856_pop">
            <electricalConnectionInstanceW id="6309" preCell="../GoC_00856_pop/0/GoC_00856" preSegment="2" postCell="../GoC_00856_pop/8/GoC_00856" postSegment="2" synapse="Gap_junction" weight="2.084930441043"/>
            <electricalConnectionInstanceW id="6312" preCell="../GoC_00856_pop/0/GoC_00856" preSegment="5" postCell="../GoC_00856_pop/11/GoC_00856" postSegment="5" synapse="Gap_junction" weight="4.635750904037539"/>
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        </electricalProjection>
    </network>
</neuroml>
